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/batch
! ANSYS input file written by Workbench version 2023 R2
! File used for geometry attach: C:\Users\micha\Downloads\Static_Structural_Spatially_Varying\Static_Structural_Spatially_Varying.agdb
/title,wbnew--Static Structural (B5)
/COM,/COM,     ANSYSMotion, 2023.2
/com,--- Data in consistent MKS units. See Solving Units in the help system for more information.
/units,MKS
/prep7
! Turn off shape checking because checks already performed inside WB mesher.
! See help system for more information.
SHPP,OFF,,NOWARN
etcon,set             ! allow ANSYS to choose best KEYOP's for 180x elements, resets any applicable keyopt to MAPDL defaults
/com,*********** Nodes for the whole assembly ***********
nblock,3,,683
(1i9,3e20.9e3)
        1     1.000000000E-03     5.506706202E-17     1.414213562E-03
        2     1.000000000E-03    -7.071067812E-04     2.121320344E-03
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-1
/com,*********** Elements for Body 1 "Part 1" ***********
et,1,186
keyo,1,2,1          ! set full integration on SOLID186
eblock,19,solid,,80
(19i9)
        1        1        1        1        0        0        0        0       20        0        1        1      144      182      188       38      181      183      189
      194      557      615      195      342      613      616      343      191      556      614      621
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-1
/com,*********** Send User Defined Coordinate System(s) ***********
local,12,0,0.,0.,0.,0.,45.,0.
csys,0
toffst,273.15,  ! Temperature offset from absolute zero
/com,*********** Set Reference Temperature ***********
tref,22.
/com,*********** Send Materials ***********
Temperature = 'TEMP' ! Temperature
MP,DENS,1,7850,	! kg m^-3
MP,ALPX,1,1.2e-05,	! C^-1
MP,C,1,434,	! J kg^-1 C^-1
MP,KXX,1,60.5,	! W m^-1 C^-1
MP,RSVX,1,1.7e-07,	! kg m^3 A^-2 s^-3
MP,EX,1,200000000000,	! Pa
MP,NUXY,1,0.3,
MP,MURX,1,10000,

!************************* Model Summary ********************
!Part 1,	Structural Steel,	matid,	1
!************************* End Model Summary ********************
/com,*********** Send Named Selection as Node Component ***********
CMBLOCK,NS_FACE1,NODE,       21
(8i10)
        58        60        81       140       141       182       183       188
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/com,*********** Send Named Selection as Node Component ***********
CMBLOCK,NS_FACE2,NODE,       21
(8i10)
        59        80       101       142       143       184       185       186
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/com,*********** Send Named Selection as Node Component ***********
CMBLOCK,NS_FACE3,NODE,      165
(8i10)
        60        61        62        63        64        65        66        67
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/com,*********** Fixed Supports ***********
CMBLOCK,_FIXEDSU,NODE,       21
(8i10)
        58        60        81       140       141       182       183       188
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cmsel,s,_FIXEDSU
d,all,all
nsel,all
/com,*********** Define Pressure Using Surface Effect Elements "Pressure" ***********
et,2,154
mat,2
eblock,10,,,40
(15i9)
      249        2        2        2        0      181      144      182      183      556      557      614      613
      250        2        2        2        0      180      145      144      181      559      555      556      612
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-1
esel,s,type,,2
keyop,2,7,0                ! Use deformed area for application of load
esel,all
!
! ANSYS Function Representation
!
*DIM,_loadvari40,TABLE,6,3,2,,,,12
!
! Begin of equation: time (Pa)
_loadvari40(0,0,1)= 0, -999
_loadvari40(2,0,1)= 0.0
_loadvari40(3,0,1)= 0.0
_loadvari40(4,0,1)= 0.0
_loadvari40(5,0,1)= 0.0
_loadvari40(6,0,1)= 0.0
_loadvari40(0,1,1)= 1.0, 99, 0, 1, 1, 0, 0
_loadvari40(0,2,1)= 0.0,
_loadvari40(0,3,1)=   1,
! End of equation: time (Pa)
!
! Begin of equation: 1e9*z (Pa)
_loadvari40(0,0,2)= -999, -999
_loadvari40(2,0,2)= 0.0
_loadvari40(3,0,2)= 0.0
_loadvari40(4,0,2)= 0.0
_loadvari40(5,0,2)= 0.0
_loadvari40(6,0,2)= 0.0
_loadvari40(0,1,2)= 1.0, -1, 0, 1000000000, 0, 0, 4
_loadvari40(0,2,2)= 0.0, -2, 0, 1, -1, 3, 4
_loadvari40(0,3,2)=   1, 99, 0, 1, -2, 0, 0
! End of equation: 1e9*z (Pa)

/com,*********** Define Pressure Using Surface Effect Elements "Pressure 2" ***********
et,3,154
mat,3
eblock,10,,,40
(15i9)
      289        3        3        3        0      181      144      182      183      556      557      614      613
      290        3        3        3        0      180      145      144      181      559      555      556      612
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-1
esel,s,type,,3
keyop,3,7,0                ! Use deformed area for application of load
esel,all
!
! ANSYS Function Representation
!
*DIM,_loadvari50,TABLE,6,3,2,,,,12
!
! Begin of equation: time (Pa)
_loadvari50(0,0,1)= 0, -999
_loadvari50(2,0,1)= 0.0
_loadvari50(3,0,1)= 0.0
_loadvari50(4,0,1)= 0.0
_loadvari50(5,0,1)= 0.0
_loadvari50(6,0,1)= 0.0
_loadvari50(0,1,1)= 1.0, 99, 0, 1, 1, 0, 0
_loadvari50(0,2,1)= 0.0,
_loadvari50(0,3,1)=   1,
! End of equation: time (Pa)
!
! Begin of equation: 1e9*z (Pa)
_loadvari50(0,0,2)= -999, -999
_loadvari50(2,0,2)= 0.0
_loadvari50(3,0,2)= 0.0
_loadvari50(4,0,2)= 0.0
_loadvari50(5,0,2)= 0.0
_loadvari50(6,0,2)= 0.0
_loadvari50(0,1,2)= 1.0, -1, 0, 1000000000, 0, 0, 4
_loadvari50(0,2,2)= 0.0, -2, 0, 1, -1, 3, 4
_loadvari50(0,3,2)=   1, 99, 0, 1, -2, 0, 0
! End of equation: 1e9*z (Pa)

esel,all
fini
/com,****************************************************************************
/com,*************************    SOLUTION       ********************************
/com,****************************************************************************
/solu
antype,0                   ! static analysis
_thickRatio=  0     ! Ratio of thick parts in the model
eqsl,sparse,,,,,1
cntr,print,1               ! print out contact info and also make no initial contact an error
cncheck,dmp		!	Enable program controlled contact splitting for distributed memory parallel run
dmpoption,emat,no             ! Don't combine emat file for DANSYS
dmpoption,esav,no             ! Don't combine esav file for DANSYS
nldiag,cont,iter           ! print out contact info each equilibrium iteration
rescontrol,,none                 ! Do not keep any restart files
/com,****************************************************
/com,******************* SOLVE FOR LS 1 OF 1 ****************
esel,s,type,,2
nsle
sf,all,pres,%_loadvari40%
esel,s,type,,3
nsle
sf,all,pres,%_loadvari50%
nsel,all
esel,all
esel,all
nsub,1,1,1
time,1.
outres,erase
outres,all,none
outres,nsol,all,
outres,rsol,all
outres,eangl,all
outres,etmp,all
outres,veng,all
outres,strs,all,
outres,epel,all,
outres,eppl,all,
outres,cont,all,
! *********** WB SOLVE COMMAND ***********
! check interactive state
*get,ANSINTER_,active,,int
*if,ANSINTER_,ne,0,then
/eof
*endif
solve
/com *************** Write FE CONNECTORS *********
CEWRITE,file,ce,,INTE
/com,****************************************************
/com,*************** FINISHED SOLVE FOR LS 1 *************
*get,_NSOLTHREADS,active,0,ntfs
*get,_NSOLPROCESSES,active,0,npfs
/post1
fini
